*HEADING
cubit(/efe/psuedo_models/psuedo_reactor/sensitivity/default.inp): 07/11/2019: 15
version: 15.3
**
********************************** P A R T S **********************************
*PART, NAME=Part-Default
**
********************************** N O D E S **********************************
*NODE, NSET=ALLNODES
       1,    3.200000e+00,    0.000000e+00,   -4.800000e+00
       2,    3.179879e+00,   -3.582863e-01,   -4.800000e+00
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**
********************************** E L E M E N T S ****************************
*ELEMENT, TYPE=C3D8R, ELSET=reactor
       1,    2912,    2858,    1569,    1592,     168,     113,      57,      58
       2,    1458,    1457,    2858,    2912,       2,       1,     113,     168
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**
********************************** N O D E S E T S **********************************
*NSET, NSET=reactor_bottom
       1,       2,       3,       4,       5,       6
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*NSET, NSET=reactor_top
    1345,    1346,    1347,    1348,    1349,    1350
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*NSET, NSET=reactor_inner
     169,     170,     171,     172,     173,     174
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*NSET, NSET=reactor_outter
      57,      58,      59,      60,      61,      62
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**
********************************** S I D E S E T S **********************************
*ELSET, ELSET=reactor_bottom_S2
       1,       2,       3,       4,       5,       6
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*SURFACE, NAME=reactor_bottom
reactor_bottom_S2, S2
*ELSET, ELSET=reactor_top_S1
    2577,    2578,    2579,    2580,    2581,    2582
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*SURFACE, NAME=reactor_top
reactor_top_S1, S1
*ELSET, ELSET=reactor_inner_S3
     226,     228,     230,     232,     234,     236
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*SURFACE, NAME=reactor_inner
reactor_inner_S3, S3
*ELSET, ELSET=reactor_outter_S5
       1,       3,       5,       7,       9,      11
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*SURFACE, NAME=reactor_outter
reactor_outter_S5, S5
**
********************************** P R O P E R T I E S ************************
*SOLID SECTION, ELSET=reactor, MATERIAL=Default-Steel
**
*END PART
**
**
**
********************************** E N D   P A R T S **********************************
**
**
********************************** A S S E M B L Y ************************************
**
*ASSEMBLY, NAME=ASSEMBLY1
**
*INSTANCE, NAME=Part-Default_1, PART=Part-Default
*END INSTANCE
**
*END ASSEMBLY
**
**
**
*MATERIAL, NAME = Default-Steel
*ELASTIC, TYPE=ISOTROPIC
2.068000e+05, 2.900000e-01
*DENSITY
7.000000e-06
*CONDUCTIVITY,TYPE=ISO
4.500000e-02
*SPECIFIC HEAT
5.000000e+02
**
**
************************************** H I S T O R Y *************************************
**
*PREPRINT
**
**************************************** S T E P 1 ***************************************
*STEP,INC=100,NAME=Default Set
**
*STATIC
1, 1, 1e-05, 1
**
**
**
**
*END STEP
